// COMSOL Multiphysics 6.3.0.290 model "model_creeping.mph"
// Outline of the model tree

Variables
  var1 "Variables 1"
    R_sph = sqrt(r^2 + z^2)  // radius (spherical)
    theta = atan2(r, z)  // theta (spherical)
    v_R = u*sin(theta) + w*cos(theta)  // r velocity (spherical)
    v_theta = u*cos(theta) - w*sin(theta)  // theta velocity (spherical)
    u_r = u  // r velocity (cylindrical)
    u_phi = v  // phi velocity (cylindrical)
    u_z = w  // z velocity (cylindrical)
    U = spf.U  // velocity magnitude (cylindrical)

Geometry
  geom1 "Geometry 1" (2D axisymmetric, length unit m)
    r1: Rectangle | size = {2, 2}; base = center
    c1: Circle | r = 0.01
    dif1: Difference | input = r1; input2 = c1
    fin: Finalize "Form Union"

Materials
  mat1: Common "Material 1" on all domains
    def: def "Basic"
      density = 1264.02
      dynamicviscosity = 2.275236

Physics
  spf: CreepingFlow on all domains
    dependent variable u = {u, v, w}
    EquationForm.form = Automatic
    PhysicalModelProperty.SwirlFlow = 1
    PhysicalModelProperty.IncludeGravity = 1
    PhysicalModelProperty.UseReducedPressure = 0
    fp1: FluidProperties (default)
    init1: init "Initial Values 1" (default)
    axi1: AxialSymmetry (default)
    wallbc1: WallBC "Wall 1" (default)
    grav1: Gravity
    inl1: InletBoundary "Inlet 1" on boundaries 2 | ComponentWise = NormalInflowVelocity; U0in = 0.009
    out1: OutletBoundary "Outlet 1" on boundaries 4 | PressureType = StaticPressure
    open1: OpenBoundary on boundaries 5 | BoundaryCondition = NoViscousStress

Mesh
  mesh1 "Mesh 1" (physics-controlled)
    size: MeshSizeDefault | table = cfd; hauto = 3

Studies
  std1 "Study 1"
    stat: Stationary

Solver configurations
  sol1 "Solution 1" (study std1)
    v1: Variables "Dependent Variables 1"
    s1: Stationary "Stationary Solver 1"
      fc1: FullyCoupled
      d1: Direct "Direct, fluid flow variables (spf)"

Datasets
  dset1: Solution | solution = sol1

Derived values
  int2: IntLine "Line Integration 1" on boundaries 6, 7
    data = dset1
    table = tbl1
    expr = {-spf.K_stressz, spf.nzmesh*p}
    unit = {N, N}
    descr = {F_t, F_n}
    intsurface = on

Tables
  tbl1: Table
    // Line Integration 1
    F_t (N) | F_n (N)
    0.00253739 | 0.0527041

Plots
  pg1: PlotGroup2D "Velocity (spf)" | data = dset1; dataisaxisym = on
    surf1: Surface | expr = spf.U
    surf2: Surface | expr = u; unit = m/s; descr = Velocity field, r-component
  pg2: PlotGroup2D "Pressure (spf)" | data = dset1; dataisaxisym = on
    con1: Contour | expr = p; levelrounding = off
  pg4: PlotGroup2D "2D Plot Group 4" | data = dset1
    surf1: Surface | expr = spf.U
  pg5: PlotGroup2D "2D Plot Group 5" | data = dset1
    str1: Streamline on boundaries 1-7 | expr = {u, w}; selnumber = 6000

Exports
  data6: Data "flow_data"
    data = dset1
    expr = {sqrt(r^2 + z^2), atan2(r, z), u*sin(theta) + w*cos(theta), u*cos(theta) - w*sin(theta), u, w, spf.U, p}
    unit = {m, rad, m/s, m/s, m/s, m/s, m/s, Pa}
    descr = {radius (spherical), theta (spherical), v_r (spherical), v_theta (spherical), u_r (cylindrical), u_z (cylindrical), Velocity magnitude, Pressure}
    filename = C:\Users\skoohy\Downloads\re_0_1\flow_data.txt
  plot1: Plot | filename = C:\Users\skoohy\Downloads\re_0_1\streamlines.txt