// COMSOL Multiphysics 6.3.0.290 model "model_laminar.mph"
// Outline of the model tree

Geometry
  geom1 "Geometry 1" (2D axisymmetric, length unit m)
    r1: Rectangle | size = {2, 2}; base = center
    c1: Circle | r = 0.01
    dif1: Difference | input = r1; input2 = c1
    fin: Finalize "Form Union"

Materials
  mat1: Common "Material 1" on all domains
    def: def "Basic"
      density = 1264.02
      dynamicviscosity = 2.275236

Physics
  spf: LaminarFlow on all domains
    dependent variable u = {u, v, w}
    PhysicalModelProperty.IncludeGravity = 1
    PhysicalModelProperty.UseReducedPressure = 0
    fp1: FluidProperties (default)
    init1: init "Initial Values 1" (default)
    axi1: AxialSymmetry (default)
    wallbc1: WallBC "Wall 1" (default)
    grav1: Gravity
    inl1: InletBoundary "Inlet 1" on boundaries 2 | U0in = 0.09
    out1: OutletBoundary "Outlet 1" on boundaries 4
    open1: OpenBoundary on boundaries 5 | BoundaryCondition = NoViscousStress

Mesh
  mesh1 "Mesh 1" (physics-controlled)
    size: MeshSizeDefault | table = cfd; hauto = 2

Studies
  std1 "Study 1"
    stat: Stationary

Solver configurations
  sol1 "Solution 1" (study std1)
    v1: Variables "Dependent Variables 1"
    s1: Stationary "Stationary Solver 1"
      fc1: FullyCoupled
      d1: Direct "Direct, fluid flow variables (spf)"

Datasets
  dset1: Solution | solution = sol1
  rev1: Revolve2D "Revolution 2D" | data = dset1; startangle = -90; revangle = 225

Derived values
  int1: IntLine "Line Integration 1" on boundaries 6, 7
    data = dset1
    table = tbl1
    expr = {-spf.K_stressz, spf.nzmesh*p}
    intsurface = on

Tables
  tbl1: Table
    // Line Integration 1
    -spf.K_stressz (N) | spf.nzmesh*p (N)
    9.1458 | 8.20051

Plots
  pg1: PlotGroup2D "Velocity (spf)" | data = dset1; dataisaxisym = on
    surf1: Surface | expr = spf.U
  pg2: PlotGroup2D "Pressure (spf)" | data = dset1; dataisaxisym = on
    con1: Contour | expr = p; levelrounding = off
  pg3: PlotGroup3D "Velocity, 3D (spf)" | data = rev1
    surf1: Surface | expr = spf.U
  pg4: PlotGroup2D "2D Plot Group 4" | data = dset1
    str1: Streamline on boundaries 1-7 | expr = {u, w}; selnumber = 6000

Exports
  data1: Data
    data = dset1
    expr = {sqrt(r^2 + z^2), atan2(r, z), u*sin(atan2(r, z)) + w*cos(atan2(r, z)), u*cos(atan2(r, z)) - w*sin(atan2(r, z)), u, w, spf.U, p}
    unit = {m, rad, m/s, m/s, m/s, m/s, m/s, Pa}
    descr = {radius (spherical), theta (spherical), v_r (spherical), v_theta (spherical), u_r (cylindrical), u_z (cylindrical), Velocity magnitude, Pressure}
    filename = C:\Users\skoohy\Downloads\re_100\flow_data.txt
  plot1: Plot | filename = C:\Users\skoohy\Downloads\re_1\streamlines.txt